*Heading
** Job name: Job-1 Model name: Model-1
** Generated by: Abaqus/CAE 2022
*Preprint, echo=NO, model=NO, history=NO, contact=NO
** ----------------------------------------------------------------
**
** PART INSTANCE: Part-1-1
**
*System
      -39.75,      -19.75,          0.,      -38.75,      -19.75,          0.
*Node
      1,    33.013752,   23.6095524
      2,   32.3809052,   23.2079372
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*Element, type=CPS4R
   1,  335,    8,  609,  585
   2,  585,  612,  334,  335
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*Nset, nset=Part-1-1_Set-1, generate
    1,  1492,     1
*Elset, elset=Part-1-1_Set-1, generate
    1,  1378,     1
** Section: Section-1
*Solid Section, elset=Part-1-1_Set-1, material=Steel
,
*System
*Node
   1493,          -6.,           2.,           0.
*Node
   1494,           2.,          -6.,           0.
*Nset, nset=Set-5
1493,
*Nset, nset=Set-6
1494,
*Nset, nset=t_Set-1
  96,  97,  98,  99, 100, 101
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*Elset, elset=t_Set-1
   7,   9,  20,  21,  26,  32
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*Nset, nset=t_Set-3
  83,  84,  85,  86,  87,  88
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*Elset, elset=t_Set-3
 178, 180, 197, 198, 201, 202
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*Nset, nset=_PickedSet7
1493,
*Nset, nset=_PickedSet9
1494,
** Constraint: Constraint-1
*Rigid Body, ref node=_PickedSet7, tie nset=t_Set-1
** Constraint: Constraint-2
*Rigid Body, ref node=_PickedSet9, tie nset=t_Set-3
**
** MATERIALS
**
*Material, name=Steel
*Density
 0.28,
*Elastic
29000., 0.3
** ----------------------------------------------------------------
**
** STEP: Step-1
**
*Step, name=Step-1, nlgeom=NO, perturbation
*Static
**
** BOUNDARY CONDITIONS
**
** Name: BC-1 Type: Symmetry/Antisymmetry/Encastre
*Boundary
Set-6, ENCASTRE
**
** LOADS
**
** Name: Load-1   Type: Concentrated force
*Cload
Set-5, 2, -10.
**
** OUTPUT REQUESTS
**
**
** FIELD OUTPUT: F-Output-1
**
*Output, field, variable=PRESELECT
**
** HISTORY OUTPUT: H-Output-1
**
*Output, history, variable=PRESELECT
*End Step
