*HEADING
Written by Materialise Abaqus export filter
** Units: mm

*PART, name=femur

*NODE
	1, 1.095989000e+02, -6.405090000e+01, 5.091553000e+02
	2, 1.090663000e+02, -6.714610000e+01, 5.092138000e+02
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*ELEMENT, TYPE=C3D4
	1, 13502, 13503, 9706, 13504
	2, 6787, 7692, 6786, 7694
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*SURFACE, TYPE=ELEMENT, NAME=Surface
73192,S1
61794,S1
66334,S1
68436,S1
54713,S1
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87428,S1
*SURFACE, TYPE=ELEMENT, NAME=base
76224,S1
60471,S1
95050,S1
85323,S1
89734,S1
81692,S1
37795,S1
39027,S1
50396,S1
78855,S1
65772,S1
75795,S1
65269,S1
68349,S1
*NSET, NSET=NS_Surface
1,2,3,4,5,6
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*NSET, NSET=NS_base
151,174,181,189,195,199
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*ELSET, ELSET=ES_Volume_0_MAT0, GENERATE
1,56,1
*SOLID SECTION, ELSET=ES_Volume_0_MAT0, MATERIAL=femur_material0
*ELSET, ELSET=ES_Volume_0_MAT1, GENERATE
57,2297,1
*SOLID SECTION, ELSET=ES_Volume_0_MAT1, MATERIAL=femur_material1
*ELSET, ELSET=ES_Volume_0_MAT2, GENERATE
2298,28137,1
*SOLID SECTION, ELSET=ES_Volume_0_MAT2, MATERIAL=femur_material2
*ELSET, ELSET=ES_Volume_0_MAT3, GENERATE
28138,39046,1
*SOLID SECTION, ELSET=ES_Volume_0_MAT3, MATERIAL=femur_material3
*ELSET, ELSET=ES_Volume_0_MAT4, GENERATE
39047,52047,1
*SOLID SECTION, ELSET=ES_Volume_0_MAT4, MATERIAL=femur_material4
*ELSET, ELSET=ES_Volume_0_MAT5, GENERATE
52048,64754,1
*SOLID SECTION, ELSET=ES_Volume_0_MAT5, MATERIAL=femur_material5
*ELSET, ELSET=ES_Volume_0_MAT6, GENERATE
64755,75913,1
*SOLID SECTION, ELSET=ES_Volume_0_MAT6, MATERIAL=femur_material6
*ELSET, ELSET=ES_Volume_0_MAT7, GENERATE
75914,85256,1
*SOLID SECTION, ELSET=ES_Volume_0_MAT7, MATERIAL=femur_material7
*ELSET, ELSET=ES_Volume_0_MAT8, GENERATE
85257,93398,1
*SOLID SECTION, ELSET=ES_Volume_0_MAT8, MATERIAL=femur_material8
*ELSET, ELSET=ES_Volume_0_MAT9, GENERATE
93399,99965,1
*SOLID SECTION, ELSET=ES_Volume_0_MAT9, MATERIAL=femur_material9
*ELSET, ELSET=ES_Volume_0_MAT10, GENERATE
99966,105900,1
*SOLID SECTION, ELSET=ES_Volume_0_MAT10, MATERIAL=femur_material10
*ELSET, ELSET=ES_Volume_0_MAT11, GENERATE
105901,111357,1
*SOLID SECTION, ELSET=ES_Volume_0_MAT11, MATERIAL=femur_material11
*ELSET, ELSET=ES_Volume_0_MAT12, GENERATE
111358,115813,1
*SOLID SECTION, ELSET=ES_Volume_0_MAT12, MATERIAL=femur_material12
*ELSET, ELSET=ES_Volume_0_MAT13, GENERATE
115814,118958,1
*SOLID SECTION, ELSET=ES_Volume_0_MAT13, MATERIAL=femur_material13
*ELSET, ELSET=ES_Volume_0_MAT14, GENERATE
118959,121247,1
*SOLID SECTION, ELSET=ES_Volume_0_MAT14, MATERIAL=femur_material14
*ELSET, ELSET=ES_Volume_0_MAT15, GENERATE
121248,122658,1
*SOLID SECTION, ELSET=ES_Volume_0_MAT15, MATERIAL=femur_material15
*ELSET, ELSET=ES_Volume_0_MAT16, GENERATE
122659,123543,1
*SOLID SECTION, ELSET=ES_Volume_0_MAT16, MATERIAL=femur_material16
*ELSET, ELSET=ES_Volume_0_MAT17, GENERATE
123544,124032,1
*SOLID SECTION, ELSET=ES_Volume_0_MAT17, MATERIAL=femur_material17
*ELSET, ELSET=ES_Volume_0_MAT18, GENERATE
124033,124200,1
*SOLID SECTION, ELSET=ES_Volume_0_MAT18, MATERIAL=femur_material18
*ELSET, ELSET=ES_Volume_0_MAT19, GENERATE
124201,124281,1
*SOLID SECTION, ELSET=ES_Volume_0_MAT19, MATERIAL=femur_material19
*ELSET, ELSET=ES_Volume_0_MAT20, GENERATE
124282,124359,1
*SOLID SECTION, ELSET=ES_Volume_0_MAT20, MATERIAL=femur_material20
*ELSET, ELSET=ES_Volume_0_MAT21, GENERATE
124360,124448,1
*SOLID SECTION, ELSET=ES_Volume_0_MAT21, MATERIAL=femur_material21
*ELSET, ELSET=ES_Volume_0_MAT22, GENERATE
124449,124552,1
*SOLID SECTION, ELSET=ES_Volume_0_MAT22, MATERIAL=femur_material22
*ELSET, ELSET=ES_Volume_0_MAT23, GENERATE
124553,124667,1
*SOLID SECTION, ELSET=ES_Volume_0_MAT23, MATERIAL=femur_material23
*ELSET, ELSET=ES_Volume_0_MAT24, GENERATE
124668,124770,1
*SOLID SECTION, ELSET=ES_Volume_0_MAT24, MATERIAL=femur_material24
*ELSET, ELSET=ES_Volume_0_MAT25, GENERATE
124771,124882,1
*SOLID SECTION, ELSET=ES_Volume_0_MAT25, MATERIAL=femur_material25
*ELSET, ELSET=ES_Volume_0_MAT26, GENERATE
124883,125021,1
*SOLID SECTION, ELSET=ES_Volume_0_MAT26, MATERIAL=femur_material26
*ELSET, ELSET=ES_Volume_0_MAT27, GENERATE
125022,125367,1
*SOLID SECTION, ELSET=ES_Volume_0_MAT27, MATERIAL=femur_material27
*ELSET, ELSET=ES_Volume_0_MAT28, GENERATE
125368,125725,1
*SOLID SECTION, ELSET=ES_Volume_0_MAT28, MATERIAL=femur_material28
*ELSET, ELSET=ES_Volume_0_MAT29, GENERATE
125726,126207,1
*SOLID SECTION, ELSET=ES_Volume_0_MAT29, MATERIAL=femur_material29
*END PART

** ASSEMBLY
**
*Assembly, name=Assembly
**
*Instance, name=femur_1, part=femur
*End Instance
**
*End Assembly

*MATERIAL, NAME=femur_material0
*DENSITY
0.01
*ELASTIC
11, 0.3
*MATERIAL, NAME=femur_material1
*DENSITY
0.01
*ELASTIC
11, 0.3
*MATERIAL, NAME=femur_material2
*DENSITY
0.01
*ELASTIC
11, 0.3
*MATERIAL, NAME=femur_material3
*DENSITY
0.127141
*ELASTIC
11.6143, 0.3
*MATERIAL, NAME=femur_material4
*DENSITY
0.296126
*ELASTIC
96.1535, 0.3
*MATERIAL, NAME=femur_material5
*DENSITY
0.46511
*ELASTIC
297.279, 0.3
*MATERIAL, NAME=femur_material6
*DENSITY
0.634094
*ELASTIC
645.148, 0.3
*MATERIAL, NAME=femur_material7
*DENSITY
0.803078
*ELASTIC
1164.58, 0.3
*MATERIAL, NAME=femur_material8
*DENSITY
0.972063
*ELASTIC
1877.2, 0.3
*MATERIAL, NAME=femur_material9
*DENSITY
1.14105
*ELASTIC
2802.42, 0.3
*MATERIAL, NAME=femur_material10
*DENSITY
1.31003
*ELASTIC
3958.03, 0.3
*MATERIAL, NAME=femur_material11
*DENSITY
1.47902
*ELASTIC
5360.52, 0.3
*MATERIAL, NAME=femur_material12
*DENSITY
1.648
*ELASTIC
7025.35, 0.3
*MATERIAL, NAME=femur_material13
*DENSITY
1.81698
*ELASTIC
8967.11, 0.3
*MATERIAL, NAME=femur_material14
*DENSITY
1.98597
*ELASTIC
11199.7, 0.3
*MATERIAL, NAME=femur_material15
*DENSITY
2.15495
*ELASTIC
13736.3, 0.3
*MATERIAL, NAME=femur_material16
*DENSITY
2.32394
*ELASTIC
16589.6, 0.3
*MATERIAL, NAME=femur_material17
*DENSITY
2.49292
*ELASTIC
19771.8, 0.3
*MATERIAL, NAME=femur_material18
*DENSITY
2.66191
*ELASTIC
23294.7, 0.3
*MATERIAL, NAME=femur_material19
*DENSITY
2.83089
*ELASTIC
27169.5, 0.3
*MATERIAL, NAME=femur_material20
*DENSITY
2.99987
*ELASTIC
31407.4, 0.3
*MATERIAL, NAME=femur_material21
*DENSITY
3.16886
*ELASTIC
36019, 0.3
*MATERIAL, NAME=femur_material22
*DENSITY
3.33784
*ELASTIC
41014.7, 0.3
*MATERIAL, NAME=femur_material23
*DENSITY
3.50683
*ELASTIC
46404.6, 0.3
*MATERIAL, NAME=femur_material24
*DENSITY
3.67581
*ELASTIC
52198.5, 0.3
*MATERIAL, NAME=femur_material25
*DENSITY
3.84479
*ELASTIC
58406.1, 0.3
*MATERIAL, NAME=femur_material26
*DENSITY
4.01378
*ELASTIC
65036.7, 0.3
*MATERIAL, NAME=femur_material27
*DENSITY
4.18276
*ELASTIC
72099.7, 0.3
*MATERIAL, NAME=femur_material28
*DENSITY
4.35175
*ELASTIC
79603.9, 0.3
*MATERIAL, NAME=femur_material29
*DENSITY
4.52073
*ELASTIC
87558.2, 0.3
